#
# https://lammpstutorials.github.io/sphinx/build/html/tutorials/level3/reactive-silicon-dioxide.html#deform-the-structure
#


units real
atom_style full

read_data ../RelaxSilica/silica-relaxed.data

#read_data ..\RelaxSilica\silica-relaxed.data

mass 1 28.0855 # Si
mass 2 15.999 # O

pair_style reaxff NULL safezone 3.0 mincap 150
pair_coeff * * ../RelaxSilica/reaxCHOFe.ff Si O
fix myqeq all qeq/reaxff 1 0.0 10.0 1.0e-6 reaxff maxiter 400

group grpSi type 1
group grpO type 2
variable qSi equal charge(grpSi)/count(grpSi)
variable qO equal charge(grpO)/count(grpO)

thermo 5
thermo_style custom step temp etotal press vol v_qSi v_qO
dump dmp all custom 100 dump.lammpstrj id type q x y z

fix myspec all reaxff/species 5 1 5 species.log element Si O

fix mynvt all nvt temp 300.0 300.0 100
timestep 0.5

# Let us run for 5000 steps without deformation, then apply the fix deform for elongating progressively the box along x during 25000 steps

run 5000

fix mydef all deform 1 x erate 5e-5

run 25000

write_data silica-deformed.data
